1958
Rnom := [18.2; 17.52; 16.8; 16.1; 15.5; 14.85; 14.26; 13.7; 13.15; 12.64; 12.15; 11.68; 11.23; 10.8; 10.4; 10; 9.6; 9.3; 8.9; 8.6; 8.27]
temp_ADC := 4095*50000/(3.8*(10000 + Rnom*1000)) = [1910.69; 1957.91; 2010.51; 2064.43; 2113; 2168.27; 2221; 2273.48; 2327.5; 2379.93; 2432.58; 2485.31; 2537.99; 2590.46; 2641.25; 2694.08; 2749.06; 2791.79; 2850.88; 2896.86; 2949.18]
